<?xml version="1.0" encoding="UTF-8"?>
<channelml xmlns="http://morphml.org/channelml/schema"
	   xmlns:xsi="http://www.w3.org/2001/XMLSchema-instance"
           xmlns:meta="http://morphml.org/metadata/schema"
           xsi:schemaLocation="http://morphml.org/channelml/schema   http://sourceforge.net/p/neuroml/code/1087/tree/trunk/web/NeuroMLFiles/Schemata/v1.8.1/Level2/ChannelML_v1.8.1.xsd?format=raw"
           units="SI Units">

	<meta:notes>A channel from Bhalla, U.S.and Bower, J.M. Exploring parameter space in detailed single neuron models:
	simulations of the mitral and granule cells of the olfactory bulb</meta:notes>

    <ion name="ca" charge="2" role="SignallingSubstance">
        <meta:notes>Signifies that the ion is involved in a process which alters its concentration</meta:notes>
    </ion>

    <ion_concentration name="Ca_mit_conc_ChannelML">

        <status value="stable">
            <meta:contributor>
                <meta:name>Simon O'Connor</meta:name>
            </meta:contributor>
        </status>

        <meta:notes>An expontially decaying pool of calcium</meta:notes>

	<meta:publication>
	  <meta:fullTitle>Bhalla, U.S.and Bower, J.M. Exploring parameter space in detailed single neuron models:
	  simulations of the mitral and granule cells of the olfactory bulb. J Neurophysiol, Nov 1993; 69: 1948 - 1965</meta:fullTitle>
	  <meta:pubmedRef>http://www.ncbi.nlm.nih.gov/entrez/query.fcgi?cmd=Retrieve&amp;db=PubMed&amp;list_uids=7688798&amp;dopt=Abstract</meta:pubmedRef>
	</meta:publication>

        <ion_species name="ca"/>

        <decaying_pool_model resting_conc ="0.00001" decay_constant="0.01">

	    <fixed_pool_info>
                <!-- this value is divided by the compt area to get the
conversion factor between current and change in concentration. -->
                <phi>95.431501</phi>
            </fixed_pool_info>

            <!-- pool_volume_info shell_thickness = "5.0e-6"/-->

        </decaying_pool_model>

    </ion_concentration>
</channelml>
