<?xml version="1.0" encoding="UTF-8"?>
<channelml xmlns="http://morphml.org/channelml/schema" xmlns:xsi="http://www.w3.org/2001/XMLSchema-instance" xmlns:meta="http://morphml.org/metadata/schema" xsi:schemaLocation="http://morphml.org/channelml/schema  http://www.neuroml.org/NeuroMLValidator/NeuroMLFiles/Schemata/v1.8.1/Level2/ChannelML_v1.8.1.xsd" units="Physiological Units">

    <meta:notes>K-A current for Mitral Cells from Wang et al (1996) M.Migliore Jan. 2002
    Note, the values used here are based on the Neuron Mod scripts accompanying Migliore et al (2005)</meta:notes>

    <ion name="k" charge="1" default_erev="-90"/>

    <channel_type name="KA_ChannelML" density="yes">

        <meta:notes>A-type K channel, with rate equations expressed in tau and inf form</meta:notes>

        <meta:authorList>
            <meta:modelTranslator>
                <meta:name>Simon O'Connor</meta:name>
                <meta:institution>University of Cardiff</meta:institution>
                <meta:email>simon.oconnor@btinternet.com</meta:email>
            </meta:modelTranslator>
        </meta:authorList>

        <meta:publication>
            <meta:fullTitle>Migliore, M., Hines, M.L., Shepherd, G.M. The Role of Distal Dendritic Gap Junctions in Synchronization of Mitral Cell Axonal Output J.Comput. Neurosci. 18, 151-161, 2005</meta:fullTitle>
	    <meta:pubmedRef>http://www.ncbi.nlm.nih.gov/entrez/query.fcgi?cmd=Retrieve&amp;db=pubmed&amp;dopt=Abstract&amp;list_uids=15714267</meta:pubmedRef>
        </meta:publication>

        <meta:neuronDBref>
            <meta:modelName>K channels</meta:modelName>
            <meta:uri>http://senselab.med.yale.edu/senselab/NeuronDB/channelGene2.htm#table3</meta:uri>
        </meta:neuronDBref>

        <current_voltage_relation>
            <ohmic ion="k">
                <conductance default_gmax="2">
                    <rate_adjustments>
                        <q10_settings q10_factor="3" experimental_temp="24"/>
                        <offset value="0"/>
                    </rate_adjustments>
                    <gate power="1">
                        <state name="m" fraction="1"/>
                    </gate>
                    <gate power="1">
                        <state name="h" fraction="1"/>
                    </gate>
                </conductance>
            </ohmic>
        </current_voltage_relation>

        <hh_gate state="m">
            <transition>
                <voltage_gate>
			  <alpha>
				<parameterised_hh type="exponential" expr="A*exp(k*(v-d))">
				    <parameter name="A" value="1"/>
				    <parameter name="k" value="0.1"/>
				    <parameter name="d" value="-45"/>
				</parameterised_hh>
			  </alpha>
			  <beta>
				<parameterised_hh type="exponential" expr="A*exp(k*(v-d))">
				    <parameter name="A" value="1"/>
				    <parameter name="k" value="0.075"/>
				    <parameter name="d" value="-45"/>
				</parameterised_hh>
			  </beta>
                    <tau>
                        <generic_equation_hh expr="beta / (0.04 *(1+alpha))"/>
                    </tau>
                    <inf>
                        <parameterised_hh type="sigmoid" expr="A/(1 + exp(k*(v-d)))">
                            <parameter name="A" value="1"/>
                            <parameter name="k" value="-(0.071428571)"/>
                            <parameter name="d" value="17.5"/>
                        </parameterised_hh>
                    </inf>
                </voltage_gate>
            </transition>
        </hh_gate>

        <hh_gate state="h">
            <transition>
                <voltage_gate>
			  <alpha>
				<parameterised_hh type="exponential" expr="A*exp(k*(v-d))">
				    <parameter name="A" value="1"/>
				    <parameter name="k" value="0.2"/>
				    <parameter name="d" value="-70"/>
				</parameterised_hh>
			  </alpha>
			  <beta>
				<parameterised_hh type="exponential" expr="A*exp(k*(v-d))">
				    <parameter name="A" value="1"/>
				    <parameter name="k" value="0.198"/>
				    <parameter name="d" value="-70"/>
				</parameterised_hh>
			  </beta>
                    <tau>
                        <generic_equation_hh expr="beta / (0.018 *(1+alpha))"/>
                    </tau>
                    <inf>
                        <parameterised_hh type="sigmoid" expr="A/(1 + exp(k*(v-d)))">
                            <parameter name="A" value="1"/>
                            <parameter name="k" value="(0.166666666)"/>
                            <parameter name="d" value="-41.7"/>
                        </parameterised_hh>
                    </inf>
                </voltage_gate>
            </transition>
        </hh_gate>

    </channel_type>
</channelml>
