<?xml version="1.0" encoding="UTF-8"?>
<channelml xmlns="http://morphml.org/channelml/schema" xmlns:xsi="http://www.w3.org/2001/XMLSchema-instance" xmlns:meta="http://morphml.org/metadata/schema" xsi:schemaLocation="http://morphml.org/channelml/schema  ../../Schemata/v1.6/Level2/ChannelML_v1.6.xsd" units="SI Units">

    <meta:notes>ChannelML file containing a single Channel description</meta:notes>

    <ion name="ca" charge="2" default_erev="0.070"/>                                                              <!-- phys units: mV -->

    <channel_type name="LCa3_mit_usb_ChannelML" density="yes">

        <status value="stable">
            <meta:comment>L channel data from: T. Hirano and S. Hagiwara Pflugers A 413(5) pp463-469, 1989</meta:comment>
            <meta:contributor>
                <meta:name>Simon O'Connor</meta:name>
            </meta:contributor>
        </status>

        <meta:notes>L type calcium conductance Hirano and Hagiwara 1989</meta:notes>

        <meta:authorList>
            <meta:modelTranslator>
                <meta:name>Simon O'Connor</meta:name>
                <meta:institution>University of Cardiff</meta:institution>
                <meta:email>simon.oconnor@btinternet.com</meta:email>
            </meta:modelTranslator>
        </meta:authorList>

        <meta:publication>
		<meta:fullTitle>U. S. Bhalla and J. M. Bower, Exploring parameter space in detailed single neuron models: simulations of the mitral and granule cells of the olfactory bulb, J. Neurophysiol., vol. 69, pp. 1948-1965, 1993.</meta:fullTitle>
		<meta:pubmedRef>http://www.ncbi.nlm.nih.gov/entrez/query.fcgi?cmd=Retrieve&amp;db=pubmed&amp;dopt=Abstract&amp;list_uids=7688798</meta:pubmedRef>
        </meta:publication>

        <meta:neuronDBref>
            <meta:modelName>Na channels</meta:modelName>
            <meta:uri>http://senselab.med.yale.edu/senselab/NeuronDB/channelGene2.htm#table2</meta:uri>
        </meta:neuronDBref>

        <current_voltage_relation>
            <ohmic ion="ca">
                <conductance default_gmax="120">                                                             <!-- phys units: mS/cm2 -->

                    <gate power="1">
                        <state name="m" fraction="1"/>
                    </gate>
                    <gate power="1">
                        <state name="h" fraction="1"/>
                    </gate>
                </conductance>
            </ohmic>
        </current_voltage_relation>

        <hh_gate state="m">
            <transition>
                <voltage_gate>
                    <alpha>
                                                                                    <!-- Note: type attr determines how A,k,d are used in parameterised_hh, expr is just for completeness-->

			<parameterised_hh type="sigmoid" expr="A/(1 + exp(k*(v-d)))">
				    <parameter name="A" value="7500"/>
				    <parameter name="k" value="-142.85714285714286"/>
				    <parameter name="d" value="0.013"/>
                        </parameterised_hh>
                    </alpha>
                    <beta>
			 <parameterised_hh type="sigmoid" expr="A/(1 + exp(k*(v-d)))">
				    <parameter name="A" value="1650"/>
				    <parameter name="k" value="250"/>
				    <parameter name="d" value="0.014"/>
                        </parameterised_hh>
                    </beta>
                </voltage_gate>
            </transition>
        </hh_gate>

        <hh_gate state="h">
            <transition>
                <voltage_gate>
                    <alpha>
                                                                                    <!-- Note: type attr determines how A,k,d are used in parameterised_hh, expr is just for completeness-->

			<parameterised_hh type="sigmoid" expr="A/(1 + exp(k*(v-d)))">
                            <parameter name="A" value="6.800"/>
                            <parameter name="k" value="83.333333333333"/>
                            <parameter name="d" value="-0.030"/>
                        </parameterised_hh>
                    </alpha>
                    <beta>
			 <parameterised_hh type="sigmoid" expr="A/(1 + exp(k*(v-d)))">
				    <parameter name="A" value="60"/>
				    <parameter name="k" value="-90.90909090909"/>
				    <parameter name="d" value="0.0"/>
                        </parameterised_hh>
                    </beta>
                </voltage_gate>
            </transition>
        </hh_gate>

            <!-- Using same table settings as orig file for LCa3_mit_usb.g -->

	<impl_prefs>
		<table_settings max_v="0.05" min_v="-0.1" table_divisions="3000"/>
	</impl_prefs>

    </channel_type>
</channelml>
