<?xml version="1.0" encoding="UTF-8"?>
<networkml xmlns="http://morphml.org/networkml/schema" xmlns:meta="http://morphml.org/metadata/schema" xmlns:xsi="http://www.w3.org/2001/XMLSchema-instance" xsi:schemaLocation="http://morphml.org/networkml/schema  NetworkML_v1.7.xsd" lengthUnits="micron">

<meta:notes>

Network structure for project: Rat_Mitral_Cell_Gap_Network saved with neuroConstruct v1.2.3 on: 14:08:40, 02-Feb-09

Cell Group: CellGroup_2 contains 1 cells
Cell Group: CellGroup_1 contains 1 cells
Cell Group: CellGroup_6 contains 1 cells
Cell Group: CellGroup_5 contains 1 cells
Cell Group: CellGroup_4 contains 1 cells
Cell Group: CellGroup_3 contains 1 cells

Network connection: NetConn_CellGroup_6_CellGroup_1 contains 100 individual synaptic connections
Network connection: NetConn_CellGroup_2_CellGroup_6 contains 100 individual synaptic connections
Network connection: NetConn_CellGroup_4_CellGroup_3 contains 100 individual synaptic connections
Network connection: NetConn_CellGroup_2_CellGroup_4 contains 100 individual synaptic connections
Network connection: NetConn_CellGroup_2_CellGroup_3 contains 100 individual synaptic connections
Network connection: NetConn_CellGroup_4_CellGroup_1 contains 100 individual synaptic connections
Network connection: NetConn_CellGroup_3_CellGroup_6 contains 100 individual synaptic connections
Network connection: NetConn_CellGroup_5_CellGroup_4 contains 100 individual synaptic connections
Network connection: NetConn_CellGroup_3_CellGroup_5 contains 100 individual synaptic connections
Network connection: NetConn_CellGroup_1_CellGroup_5 contains 100 individual synaptic connections
Network connection: NetConn_CellGroup_5_CellGroup_2 contains 100 individual synaptic connections
Network connection: NetConn_CellGroup_6_CellGroup_5 contains 100 individual synaptic connections
Network connection: NetConn_CellGroup_1_CellGroup_2 contains 100 individual synaptic connections
Network connection: NetConn_CellGroup_3_CellGroup_1 contains 100 individual synaptic connections
Network connection: NetConn_CellGroup_6_CellGroup_4 contains 100 individual synaptic connections

</meta:notes>

<meta:properties>
    <meta:property>
        <meta:tag>neuroConstruct_random_seed</meta:tag>
        <meta:value>-520664829</meta:value>
    </meta:property>
    <meta:property>
        <meta:tag>neuroConstruct_sim_config</meta:tag>
        <meta:value>Default Simulation Configuration</meta:value>
    </meta:property>
</meta:properties>

<populations>
    <population name="CellGroup_2" cell_type="Cell3">
        <instances size="1">
            <instance id="0">
                <location x="170.0" y="200.0" z="25.0"/>
            </instance>
        </instances>
    </population>
    <population name="CellGroup_1" cell_type="Cell2">
        <instances size="1">
            <instance id="0">
                <location x="25.0" y="25.0" z="43.0"/>
            </instance>
        </instances>
    </population>
    <population name="CellGroup_6" cell_type="Cell6">
        <instances size="1">
            <instance id="0">
                <location x="-435.0" y="260.0" z="25.0"/>
            </instance>
        </instances>
    </population>
    <population name="CellGroup_5" cell_type="Cell5">
        <instances size="1">
            <instance id="0">
                <location x="-595.0" y="260.0" z="25.0"/>
            </instance>
        </instances>
    </population>
    <population name="CellGroup_4" cell_type="Cell4">
        <instances size="1">
            <instance id="0">
                <location x="85.0" y="230.0" z="25.0"/>
            </instance>
        </instances>
    </population>
    <population name="CellGroup_3" cell_type="Cell1">
        <instances size="1">
            <instance id="0">
                <location x="-445.0" y="150.0" z="25.0"/>
            </instance>
        </instances>
    </population>
</populations>

<projections units="Physiological Units">
    <projection name="NetConn_CellGroup_6_CellGroup_1" source="CellGroup_6" target="CellGroup_1">
        <synapse_props synapse_type="Gap_Junction_simple" internal_delay="5.0" weight="1.0" threshold="-20.0">
        </synapse_props>
        <connections>
            <connection id="0" pre_cell_id="0" pre_segment_id="955" pre_fraction_along="0.21082197" post_cell_id="0" post_segment_id="1623" post_fraction_along="0.11155693">
            </connection>
            <connection id="1" pre_cell_id="0" pre_segment_id="963" pre_fraction_along="0.68393886" post_cell_id="0" post_segment_id="1375" post_fraction_along="0.31943065">
            </connection>
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        </connections>
    </projection>
    <projection name="NetConn_CellGroup_2_CellGroup_6" source="CellGroup_2" target="CellGroup_6">
        <synapse_props synapse_type="Gap_Junction_simple" internal_delay="5.0" weight="1.0" threshold="-20.0">
        </synapse_props>
        <connections>
            <connection id="0" pre_cell_id="0" pre_segment_id="942" pre_fraction_along="0.7096687" post_cell_id="0" post_segment_id="945" post_fraction_along="0.91093504">
            </connection>
            <connection id="1" pre_cell_id="0" pre_segment_id="564" pre_fraction_along="0.3131657" post_cell_id="0" post_segment_id="1002" post_fraction_along="0.971026">
            </connection>
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        </connections>
    </projection>
    <projection name="NetConn_CellGroup_4_CellGroup_3" source="CellGroup_4" target="CellGroup_3">
        <synapse_props synapse_type="Gap_Junction_simple" internal_delay="5.0" weight="1.0" threshold="-20.0">
        </synapse_props>
        <connections>
            <connection id="0" pre_cell_id="0" pre_segment_id="854" pre_fraction_along="0.23085298" post_cell_id="0" post_segment_id="290" post_fraction_along="0.93410426">
            </connection>
            <connection id="1" pre_cell_id="0" pre_segment_id="961" pre_fraction_along="0.52610666" post_cell_id="0" post_segment_id="421" post_fraction_along="0.599715">
            </connection>
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        </connections>
    </projection>
    <projection name="NetConn_CellGroup_2_CellGroup_4" source="CellGroup_2" target="CellGroup_4">
        <synapse_props synapse_type="Gap_Junction_simple" internal_delay="5.0" weight="1.0" threshold="-20.0">
        </synapse_props>
        <connections>
            <connection id="0" pre_cell_id="0" pre_segment_id="535" pre_fraction_along="0.28481856" post_cell_id="0" post_segment_id="909" post_fraction_along="0.1896987">
            </connection>
            <connection id="1" pre_cell_id="0" pre_segment_id="1236" pre_fraction_along="0.7468548" post_cell_id="0" post_segment_id="936" post_fraction_along="0.5373422">
            </connection>
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        </connections>
    </projection>
    <projection name="NetConn_CellGroup_2_CellGroup_3" source="CellGroup_2" target="CellGroup_3">
        <synapse_props synapse_type="Gap_Junction_simple" internal_delay="5.0" weight="1.0" threshold="-20.0">
        </synapse_props>
        <connections>
            <connection id="0" pre_cell_id="0" pre_segment_id="595" pre_fraction_along="0.5270591" post_cell_id="0" post_segment_id="368" post_fraction_along="0.9814472">
            </connection>
            <connection id="1" pre_cell_id="0" pre_segment_id="1245" pre_fraction_along="0.22568978" post_cell_id="0" post_segment_id="368" post_fraction_along="0.11926491">
            </connection>
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        </connections>
    </projection>
    <projection name="NetConn_CellGroup_4_CellGroup_1" source="CellGroup_4" target="CellGroup_1">
        <synapse_props synapse_type="Gap_Junction_simple" internal_delay="5.0" weight="1.0" threshold="-20.0">
        </synapse_props>
        <connections>
            <connection id="0" pre_cell_id="0" pre_segment_id="883" pre_fraction_along="0.23535478" post_cell_id="0" post_segment_id="1386" post_fraction_along="0.69148666">
            </connection>
            <connection id="1" pre_cell_id="0" pre_segment_id="829" pre_fraction_along="0.061682012" post_cell_id="0" post_segment_id="1531" post_fraction_along="0.91913104">
            </connection>
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        </connections>
    </projection>
    <projection name="NetConn_CellGroup_3_CellGroup_6" source="CellGroup_3" target="CellGroup_6">
        <synapse_props synapse_type="Gap_Junction_simple" internal_delay="5.0" weight="1.0" threshold="-20.0">
        </synapse_props>
        <connections>
            <connection id="0" pre_cell_id="0" pre_segment_id="391" pre_fraction_along="0.71476704" post_cell_id="0" post_segment_id="910" post_fraction_along="0.14562589">
            </connection>
            <connection id="1" pre_cell_id="0" pre_segment_id="266" pre_fraction_along="0.15973887" post_cell_id="0" post_segment_id="978" post_fraction_along="0.9241849">
            </connection>
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        </connections>
    </projection>
    <projection name="NetConn_CellGroup_5_CellGroup_4" source="CellGroup_5" target="CellGroup_4">
        <synapse_props synapse_type="Gap_Junction_simple" internal_delay="5.0" weight="1.0" threshold="-20.0">
        </synapse_props>
        <connections>
            <connection id="0" pre_cell_id="0" pre_segment_id="1984" pre_fraction_along="0.46216327" post_cell_id="0" post_segment_id="872" post_fraction_along="0.061549153">
            </connection>
            <connection id="1" pre_cell_id="0" pre_segment_id="1975" pre_fraction_along="0.722229" post_cell_id="0" post_segment_id="951" post_fraction_along="0.9787746">
            </connection>
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        </connections>
    </projection>
    <projection name="NetConn_CellGroup_3_CellGroup_5" source="CellGroup_3" target="CellGroup_5">
        <synapse_props synapse_type="Gap_Junction_simple" internal_delay="5.0" weight="1.0" threshold="-20.0">
        </synapse_props>
        <connections>
            <connection id="0" pre_cell_id="0" pre_segment_id="347" pre_fraction_along="0.6319825" post_cell_id="0" post_segment_id="1934" post_fraction_along="0.36789665">
            </connection>
            <connection id="1" pre_cell_id="0" pre_segment_id="426" pre_fraction_along="0.6287761" post_cell_id="0" post_segment_id="1937" post_fraction_along="0.9440086">
            </connection>
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        </connections>
    </projection>
    <projection name="NetConn_CellGroup_1_CellGroup_5" source="CellGroup_1" target="CellGroup_5">
        <synapse_props synapse_type="Gap_Junction_simple" internal_delay="5.0" weight="1.0" threshold="-20.0">
        </synapse_props>
        <connections>
            <connection id="0" pre_cell_id="0" pre_segment_id="977" pre_fraction_along="0.4131683" post_cell_id="0" post_segment_id="2017" post_fraction_along="0.98375934">
            </connection>
            <connection id="1" pre_cell_id="0" pre_segment_id="1756" pre_fraction_along="0.29667148" post_cell_id="0" post_segment_id="1918" post_fraction_along="0.9684672">
            </connection>
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        </connections>
    </projection>
    <projection name="NetConn_CellGroup_5_CellGroup_2" source="CellGroup_5" target="CellGroup_2">
        <synapse_props synapse_type="Gap_Junction_simple" internal_delay="5.0" weight="1.0" threshold="-20.0">
        </synapse_props>
        <connections>
            <connection id="0" pre_cell_id="0" pre_segment_id="1951" pre_fraction_along="0.41930956" post_cell_id="0" post_segment_id="509" post_fraction_along="0.43996784">
            </connection>
            <connection id="1" pre_cell_id="0" pre_segment_id="1969" pre_fraction_along="0.63729787" post_cell_id="0" post_segment_id="665" post_fraction_along="0.53944325">
            </connection>
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        </connections>
    </projection>
    <projection name="NetConn_CellGroup_6_CellGroup_5" source="CellGroup_6" target="CellGroup_5">
        <synapse_props synapse_type="Gap_Junction_simple" internal_delay="5.0" weight="1.0" threshold="-20.0">
        </synapse_props>
        <connections>
            <connection id="0" pre_cell_id="0" pre_segment_id="994" pre_fraction_along="0.5062456" post_cell_id="0" post_segment_id="1879" post_fraction_along="0.9167645">
            </connection>
            <connection id="1" pre_cell_id="0" pre_segment_id="920" pre_fraction_along="0.18990101" post_cell_id="0" post_segment_id="1972" post_fraction_along="0.13565297">
            </connection>
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        </connections>
    </projection>
    <projection name="NetConn_CellGroup_1_CellGroup_2" source="CellGroup_1" target="CellGroup_2">
        <synapse_props synapse_type="Gap_Junction_simple" internal_delay="5.0" weight="1.0" threshold="-20.0">
        </synapse_props>
        <connections>
            <connection id="0" pre_cell_id="0" pre_segment_id="1165" pre_fraction_along="0.5599978" post_cell_id="0" post_segment_id="578" post_fraction_along="0.054417696">
            </connection>
            <connection id="1" pre_cell_id="0" pre_segment_id="1409" pre_fraction_along="0.942969" post_cell_id="0" post_segment_id="565" post_fraction_along="0.5228924">
            </connection>
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        </connections>
    </projection>
    <projection name="NetConn_CellGroup_3_CellGroup_1" source="CellGroup_3" target="CellGroup_1">
        <synapse_props synapse_type="Gap_Junction_simple" internal_delay="5.0" weight="1.0" threshold="-20.0">
        </synapse_props>
        <connections>
            <connection id="0" pre_cell_id="0" pre_segment_id="341" pre_fraction_along="0.2742974" post_cell_id="0" post_segment_id="1373" post_fraction_along="0.045662463">
            </connection>
            <connection id="1" pre_cell_id="0" pre_segment_id="355" pre_fraction_along="0.29378337" post_cell_id="0" post_segment_id="1397" post_fraction_along="0.5689967">
            </connection>
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        </connections>
    </projection>
    <projection name="NetConn_CellGroup_6_CellGroup_4" source="CellGroup_6" target="CellGroup_4">
        <synapse_props synapse_type="Gap_Junction_simple" internal_delay="5.0" weight="1.0" threshold="-20.0">
        </synapse_props>
        <connections>
            <connection id="0" pre_cell_id="0" pre_segment_id="932" pre_fraction_along="0.68795764" post_cell_id="0" post_segment_id="932" post_fraction_along="0.20559756">
            </connection>
            <connection id="1" pre_cell_id="0" pre_segment_id="984" pre_fraction_along="0.32946804" post_cell_id="0" post_segment_id="1010" post_fraction_along="0.028620256">
            </connection>
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        </connections>
    </projection>
</projections>

        <inputs units="Physiological Units">
    <input name="Input_39">
        <pulse_input delay="10.0" duration="290.0" amplitude="6.0E-5"/>
        <target population="CellGroup_2">
            <sites size="1">
                <site cell_id="0" segment_id="1168" fraction_along="0.5"/>
            </sites>
        </target>
    </input>
    <input name="Input_38">
        <pulse_input delay="10.0" duration="290.0" amplitude="6.0E-5"/>
        <target population="CellGroup_2">
            <sites size="1">
                <site cell_id="0" segment_id="1100" fraction_along="0.5"/>
            </sites>
        </target>
    </input>
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</inputs>

</networkml>
